### Eric Frizzell May, 2024 - efrizz@umd.edu
### https://github.com/efrizz-umd/SID_runout
###
### -- decay wave initiation script --
### LIGGGHTS Input script (https://www.cfdem.com/liggghts-open-source-discrete-element-method-particle-simulation-code)
###
### This script initiates a decaying wave within a long, thin granular channel with
### (periodic boundary conditions in the x direction). See the README for more details, or
### Frizzell & Hartzell, 2024 - Wave transmission through the megaregolith as a mechanism for lunar cold spot formation

### Initialization
## Preliminaries
units 	si
atom_style 	granular

# the product of the processors must equal P, the number of processors used when running the file: mpirun -np 4 ...
processors 	1 128 1

# periodic x boundaries, fixed y boundaries, fixed -z for floor and fixed shrink wrap for ceiling
boundary 	p f fm

#LIGGGHTS-Public should produce the same answers for any newton flag setting, besides round off
newton 	off

hard_particles yes
# communicate single - each processor acquires information for ghost atoms within a single distance of its sub domain - the default
# vel yes - communicate velocity info with ghost atoms
communicate 	single vel yes

# set particle sizing variables
variable SF equal 1000 # scaling factor

variable r_p equal ${SF}*1.25e-3 #1
variable d_p equal 2*${r_p}

## Declare domain
# Dimensions are scaled from the base case channel dimensions of 2m, 20cm, 2cm
variable x_lo equal -.01*${SF}
variable x_hi equal 0.01*${SF}
variable y_lo equal 0
variable y_hi equal 2*${SF}
variable z_lo equal 0
variable z_hi equal 0.2*${SF}
variable z_highest equal ${z_hi}+0.35*${SF}

# -x +x -y +y -z +z
# reg is the name of the region, block is the region type, unit box means define in box units instead of lattice
region  reg block ${x_lo} ${x_hi} ${y_lo} ${y_hi} ${z_lo} ${z_highest} units box

# import initial state via restart file
# modify path and file name as needed
read_restart ../../scale_size/1.25m/restart_2m_medium_1.25mR.static

# neighbor skin style - atom pairs within a neighbor cutoff distance = force cutoff + skin distance, style = bin
variable n_r equal 0.5*${r_p}
neighbor	 ${n_r} bin

# neigh_modify delay 0, this is the default, rebuild neighbor list every timestep
neigh_modify delay 0

## Material properties
fix            m1 all property/global youngsModulus peratomtype 50E9
fix            m2 all property/global poissonsRatio peratomtype 0.2
fix            m3 all property/global coefficientRestitution peratomtypepair 1 0.55
fix            m4 all property/global coefficientFriction peratomtypepair 1 1.0
fix            m5 all property/global characteristicVelocity scalar .01
fix            m6 all property/global cohesionEnergyDensity peratomtypepair 1 1000.0
fix             m7 all property/global coefficientRollingFriction peratomtypepair 1 0.8
fix             m8 all property/global coefficientRollingViscousDamping peratomtypepair 1 2.0

## Pair style
pair_style     gran model hertz tangential history cohesion sjkr rolling_friction epsd torsionTorque on
pair_coeff	* *  # the asterisks set force field coefficients for all atom types

# timestep
timestep	0.00001

## Thermo settings
# thermo style custom says what thermo data we want printed at each thermo timestep - timestep, num atoms, kinetic energy, volume
thermo_style 	custom step atoms ke vol
# thermo output every 1000 timesteps
thermo		1000
# LIGGGHTS will ignore last particles and will not normalize against num atoms
thermo_modify	lost ignore norm no

## box walls - define simulation
fix		wall_y1 all wall/gran model hertz tangential history cohesion sjkr rolling_friction epsd primitive type 1 yplane 0.0 	# wall moves later
fix		wall_y2 all wall/gran model hertz tangential history cohesion sjkr rolling_friction epsd primitive type 1 yplane ${y_hi}  	# "endcap"
fix		wall_z1 all wall/gran model hertz tangential history cohesion sjkr rolling_friction epsd primitive type 1 zplane 0.0  		# floor

## overburden plate
# before putting the plate in, make density adjustments
set type 1 density 324 # plate density
set region reg density 3000

# insert plate - STL object with channel with/length dimensions,
# weight set to emulate a desired pressure
variable scaleSTL equal 0.000999*${SF}
variable raiseSTL equal ${SF}*0.2

fix             overplate all mesh/surface file meshes/overplate_moremesh.stl type 1 scale ${scaleSTL} move 0.00 0.0 ${raiseSTL}
fix granwalls_overplate all wall/gran model hertz tangential history cohesion sjkr rolling_friction epsd mesh n_meshes 1 meshes overplate

## Particle and particle region definitions
# region and insertion
group		nve_group region reg

# moon gravity defined in -z vector
fix             2 all gravity 1.625 vector 0.0 0.0 -1.0


# apply nve integration to all particles that are inserted as single particles
fix		integr nve_group nve/sphere

# calculations
fix ts_check all check/timestep/gran 1000 0.1 0.1
compute stressed all stress/atom
compute deltas all pair/gran/local id delta

# let the packing relax under viscous damping
velocity       all set 0. 0. 0.


# define output - for diagnostics, uncomment needed
#dump            dmp3 all custom 40000 post_compress/dump*.post id type x y z vx vy vz radius fx fy fz mass &
#                                c_stressed[1] c_stressed[2] c_stressed[3] &
#                                         c_stressed[4] c_stressed[5] c_stressed[6]

# settling time
run     400000 every 25000 "write_restart continueshock.static"

# kinetic energy decimation
run     600000 every 25000 "velocity all set 0.0 0.0 0.0"

#undump dmp3


# define bumpy floor
region floorRaft block ${x_lo} ${x_hi} ${y_lo} ${y_hi} ${z_lo} ${d_p}
group floorFreeze region floorRaft
fix freezer floorFreeze freeze

# define piston
region piston block ${x_lo} ${x_hi} ${y_lo} ${d_p} ${z_lo} ${z_highest} units box
group pistons region piston


# decay output
dump            dmp all custom 250 post/dump*.post id type x y z vx vy vz radius fx fy fz mass &
                        c_stressed[1] c_stressed[2] c_stressed[3] &
                                         c_stressed[4] c_stressed[5] c_stressed[6]

dump dmp_local all local 250 post_computes/dump_computes*.post c_deltas[1] c_deltas[2] c_deltas[4]

reset_timestep  0

run 1

variable v equal 1000
velocity pistons set 0.0 ${v} 0.0
velocity floorFreeze set 0.0 0.0 0.0

# high res region
run 12000 upto

undump dmp
undump dmp_local

dump            dmp2 all custom 2000 post/dump*.post id type x y z vx vy vz radius fx fy fz mass &
                        c_stressed[1] c_stressed[2] c_stressed[3] &
                                         c_stressed[4] c_stressed[5] c_stressed[6]

dump dmp_local2 all local 2000 post_computes/dump_computes*.post c_deltas[1] c_deltas[2] c_deltas[4]


run     500000 upto every 20000 "write_restart continueshock.static"

# low res
#run 2000000 upto every 25000 "write_restart continueshock.static"

undump          dmp2
undump          dmp_local2


run 1
